** written by FreeCAD inp file writer for CalculiX,Abaqus meshes
** highest dimension mesh elements only.

** Nodes
*Node, NSET=Nall
1, 4, -9.797174393179e-16, 0
2, 4, -9.797174393179e-16, 50
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

** Volume elements
*Element, TYPE=C3D10, ELSET=Evolumes
2085, 188, 242, 501, 168, 1521, 3935, 3936, 1337, 1471, 3937
2086, 25, 526, 26, 137, 3938, 3939, 1007, 1165, 3940, 1166
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
** Define element set Eall
*ELSET, ELSET=Eall
Evolumes


***********************************************************
** Element sets for materials and FEM element type (solid, shell, beam, fluid)
** written by write_element_sets_material_and_femelement_type function
*ELSET,ELSET=FemMaterialSolid
Evolumes

***********************************************************
** constraints fixed node sets
** written by write_node_sets_constraints_fixed function
** ConstraintFixed
*NSET,NSET=ConstraintFixed
1,
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
***********************************************************
** constraints transform node sets
** written by write_node_sets_constraints_transform function
** ConstraintTransform
*NSET,NSET=CylinConstraintTransform
3,
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
***********************************************************
** Materials
** written by write_materials function
** Young's modulus unit is MPa = N/mm2
** FreeCAD material name: CalculiX-Steel
** FemMaterial
*MATERIAL, NAME=FemMaterial
*ELASTIC
210000, 0.300

***********************************************************
** Sections
** written by write_femelementsets function
*SOLID SECTION, ELSET=FemMaterialSolid, MATERIAL=FemMaterial

***********************************************************
** Transform Constraints
** written by write_constraints_transform function
** ConstraintTransform
*TRANSFORM, NSET=CylinConstraintTransform, TYPE=C
0.000000,0.000000,35.000000,0.000000,0.000000,15.000000

***********************************************************
** At least one step is needed to run an CalculiX analysis of FreeCAD
** written by write_step_begin function
*STEP
*STATIC


***********************************************************
** Fixed Constraints
** written by write_constraints_fixed function
** ConstraintFixed
*BOUNDARY
ConstraintFixed,1
ConstraintFixed,2
ConstraintFixed,3


***********************************************************
** constraints force node loads
** written by write_constraints_force function
*CLOAD
** ConstraintForce
** node loads on shape: Cut:Face1
3,2,-0.0000000000000E+00
4,2,-0.0000000000000E+00
58,2,-0.0000000000000E+00
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3934,2,-7.1439106284306E+01


***********************************************************
** Outputs --> frd file
** written by write_outputs_types function
*NODE FILE
U
*EL FILE
S, E
** outputs --> dat file
** reaction forces for Constraint fixed
*NODE PRINT, NSET=ConstraintFixed, TOTALS=ONLY
RF


***********************************************************
** written by write_step_end function
*END STEP

***********************************************************
** CalculiX Input file
** written by write_footer function
**   written by    --> FreeCAD 0.19.21802 +11 (Git)
**   written on    --> Tue Jun 30 03:36:40 2020
**   file name     -->
**   analysis name --> Analysis
**
**
**
**   Units
**
**   Geometry (mesh data)        --> mm
**   Materials (Young's modulus) --> N/mm2 = MPa
**   Loads (nodal loads)         --> N
**
